Wed Dec 15 10:28:05 CST 2021
;****************************************************************************************************************
$PROBLEM    RUN5
$INPUT      ID TIME DV MDV AMT EVID CMT
;****************************************************************************************************************
$DATA      datasim.csv IGNORE=@

;****************************************************************************************************************
$SUBROUTINE ADVAN8 TOL=5
$MODEL      COMP(ABSORB,DEFDOSE) COMP (CENTRAL) COMP (PERIPH)
$PK

 TVV2  = THETA(1)
 TVCL  = THETA(2)

 V2=TVV2*EXP(ETA(1))                                                 ; volume central
 CL=TVCL*EXP(ETA(2))                                                 ; clearance
 V3=THETA(3)  									                     ; volume peripheral
 Q =THETA(4)  									                     ; intercompartimental clearance
 KA=THETA(5)			        									 ; absorption rate constant

 K20=CL/V2
 K23=Q/V2
 K32=Q/V3

;****************************************************************************************************************
$DES
 DADT(1) = -A(1)*KA                              ; First compartment is absorption compartment
 DADT(2) = A(1)*KA + A(3)*K32 -A(2)*(K20+K23)    ; Central Compartment
 DADT(3) = A(2)*K23-A(3)*K32                     ; Peripheral Compartment

;****************************************************************************************************************
$ERROR
IPRD1=A(2)/V2
IPRED= IPRD1
PROP=THETA(6)*IPRD1
W=SQRT(PROP**2)
IRES=DV-IPRED
IWRES=IRES/W
Y= IPRED + W*EPS(1)

;****************************************************************************************************************
$THETA  (0,20) ; V2,label='Central Volume',units='L',trans='',type='Structural'
$THETA  (0,0.6) ; CL,label='Clearance',units='L/h',trans='',type= 'Structural'
$THETA  (0,80) ; V3,label='Peripheral Volume',units='L',trans='',type='Structural'
$THETA  (0,1.8) ; Q,label='Intercompartimental Clearance',units='L/h',trans='',type='Structural'
$THETA  (0,0.7) ; KA,label='Absorption Rate',units='h-1',trans='',type='Structural'
$THETA  (0,0.1) ; ERRPROP,label='Proportional Error',units='-',trans='',type='RUV'
$OMEGA  BLOCK(2)
 0.1  ; nV2, label='On Volume', type='IIV'
 0.02 0.1  ; nCL, label='On Clearance', type='IIV'
;Initial value of SIGMA
$SIGMA  1  FIX
$ESTIMATION MAXEVALS=9999 METHOD=1 INTER NOABORT NSIG=3 POSTHOC
            PRINT=1
$COVARIANCE UNCONDITIONAL

NM-TRAN MESSAGES
 WARNINGS AND ERRORS (IF ANY) FOR PROBLEM    1
 (WARNING  2) NM-TRAN INFERS THAT THE DATA ARE POPULATION.

1NONLINEAR MIXED EFFECTS MODEL PROGRAM (NONMEM) VERSION 7.4.3
 ORIGINALLY DEVELOPED BY STUART BEAL, LEWIS SHEINER, AND ALISON BOECKMANN
 CURRENT DEVELOPERS ARE ROBERT BAUER, ICON DEVELOPMENT SOLUTIONS,
 AND ALISON BOECKMANN. IMPLEMENTATION, EFFICIENCY, AND STANDARDIZATION
 PERFORMED BY NOUS INFOSYSTEMS.
 PROBLEM NO.:         1
 RUN5
 TOT. NO. OF OBS RECS:      150
 TOT. NO. OF INDIVIDUALS:       30
 GENERAL NONLINEAR KINETICS MODEL WITH STIFF EQUATIONS (DGEAR1, ADVAN8)
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 #TBLN:      1
 #METH: First Order Conditional Estimation with Interaction
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
 #TERM:
0MINIMIZATION TERMINATED
 DUE TO ROUNDING ERRORS (ERROR=134)
 NO. OF FUNCTION EVALUATIONS USED:      226
 NO. OF SIG. DIGITS IN FINAL EST.:  3.0

 ETABAR IS THE ARITHMETIC MEAN OF THE ETA-ESTIMATES,
 AND THE P-VALUE IS GIVEN FOR THE NULL HYPOTHESIS THAT THE TRUE MEAN IS 0.

 ETABAR:        -7.4049E-04  1.0148E-02
 SE:             7.3572E-02  1.0604E-01
 N:                      30          30

 P VAL.:         9.9197E-01  9.2376E-01

 ETASHRINKSD(%)  2.9494E-01  1.3087E+00
 ETASHRINKVR(%)  5.8902E-01  2.6003E+00
 EBVSHRINKSD(%)  1.8370E+00  1.9726E+00
 EBVSHRINKVR(%)  3.6403E+00  3.9063E+00
 EPSSHRINKSD(%)  2.0073E+01
 EPSSHRINKVR(%)  3.6117E+01


 TOTAL DATA POINTS NORMALLY DISTRIBUTED (N):          150
 N*LOG(2PI) CONSTANT TO OBJECTIVE FUNCTION:    275.68155996140177
 OBJECTIVE FUNCTION VALUE WITHOUT CONSTANT:   -298.97149178459682
 OBJECTIVE FUNCTION VALUE WITH CONSTANT:      -23.289931823195047
 REPORTED OBJECTIVE FUNCTION DOES NOT CONTAIN CONSTANT

 TOTAL EFFECTIVE ETAS (NIND*NETA):                            60


 #TERE:
 Elapsed estimation  time in seconds:    21.16
 Elapsed covariance  time in seconds:    18.81
 Elapsed postprocess time in seconds:     0.00

 ********************               FIRST ORDER CONDITIONAL ESTIMATION WITH INTERACTION              ********************
 #OBJT:**************                       MINIMUM VALUE OF OBJECTIVE FUNCTION                      ********************
 #OBJV:********************************************     -298.971       **************************************************

 ********************               FIRST ORDER CONDITIONAL ESTIMATION WITH INTERACTION              ********************
 ********************                             FINAL PARAMETER ESTIMATE                           ********************

 THETA - VECTOR OF FIXED EFFECTS PARAMETERS   *********
         TH 1      TH 2      TH 3      TH 4      TH 5      TH 6
         2.47E+01  6.59E-01  7.65E+01  1.83E+00  6.53E-01  1.02E-01

 OMEGA - COV MATRIX FOR RANDOM EFFECTS - ETAS  ********
         ETA1      ETA2
 ETA1
+        1.69E-01
 ETA2
+        1.40E-01  3.58E-01

 SIGMA - COV MATRIX FOR RANDOM EFFECTS - EPSILONS  ****
         EPS1
 EPS1
+        1.00E+00

 OMEGA - CORR MATRIX FOR RANDOM EFFECTS - ETAS  *******
         ETA1      ETA2
 ETA1
+        4.11E-01
 ETA2
+        5.70E-01  5.99E-01

 SIGMA - CORR MATRIX FOR RANDOM EFFECTS - EPSILONS  ***
         EPS1
 EPS1
+        1.00E+00

 ********************               FIRST ORDER CONDITIONAL ESTIMATION WITH INTERACTION              ********************
 ********************                            STANDARD ERROR OF ESTIMATE                          ********************

 THETA - VECTOR OF FIXED EFFECTS PARAMETERS   *********
         TH 1      TH 2      TH 3      TH 4      TH 5      TH 6
         2.05E+00  1.64E+00  1.49E+02  6.36E-01  3.44E-01  1.50E-01

 OMEGA - COV MATRIX FOR RANDOM EFFECTS - ETAS  ********
         ETA1      ETA2
 ETA1
+        3.75E-02
 ETA2
+        2.79E-01  1.01E+00

 SIGMA - COV MATRIX FOR RANDOM EFFECTS - EPSILONS  ****
         EPS1
 EPS1
+       .........

 OMEGA - CORR MATRIX FOR RANDOM EFFECTS - ETAS  *******
         ETA1      ETA2
 ETA1
+        4.56E-02
 ETA2
+        3.61E-01  8.44E-01

 SIGMA - CORR MATRIX FOR RANDOM EFFECTS - EPSILONS  ***
         EPS1
 EPS1
+       .........

 ********************               FIRST ORDER CONDITIONAL ESTIMATION WITH INTERACTION              ********************
 ********************                          COVARIANCE MATRIX OF ESTIMATE                         ********************

            TH 1      TH 2      TH 3      TH 4      TH 5      TH 6      OM11      OM12      OM22      SG11
 TH 1
+        4.19E+00
 TH 2
+        1.27E+00  2.69E+00
 TH 3
+       -1.10E+02 -2.44E+02  2.22E+04
 TH 4
+       -4.37E-01 -1.04E+00  9.44E+01  4.05E-01
 TH 5
+       -2.42E-01 -5.63E-01  5.11E+01  2.18E-01  1.18E-01
 TH 6
+        1.10E-01  2.45E-01 -2.23E+01 -9.49E-02 -5.14E-02  2.24E-02
 OM11
+       -5.75E-03  2.22E-02 -2.05E+00 -8.63E-03 -4.60E-03  2.05E-03  1.41E-03
 OM12
+       -2.16E-01 -4.51E-01  4.10E+01  1.74E-01  9.44E-02 -4.12E-02 -2.96E-03  7.78E-02
 OM22
+       -7.47E-01 -1.65E+00  1.50E+02  6.38E-01  3.46E-01 -1.51E-01 -1.33E-02  2.80E-01  1.02E+00
 SG11
+       ......... ......... ......... ......... ......... ......... ......... ......... ......... .........

 ********************               FIRST ORDER CONDITIONAL ESTIMATION WITH INTERACTION              ********************
 ********************                          CORRELATION MATRIX OF ESTIMATE                        ********************

            TH 1      TH 2      TH 3      TH 4      TH 5      TH 6      OM11      OM12      OM22      SG11
 TH 1
+        2.05E+00
 TH 2
+        3.79E-01  1.64E+00
 TH 3
+       -3.60E-01 -9.99E-01  1.49E+02
 TH 4
+       -3.35E-01 -9.95E-01  9.95E-01  6.36E-01
 TH 5
+       -3.44E-01 -9.98E-01  9.98E-01  9.98E-01  3.44E-01
 TH 6
+        3.59E-01  9.98E-01 -9.99E-01 -9.96E-01 -9.99E-01  1.50E-01
 OM11
+       -7.49E-02  3.61E-01 -3.67E-01 -3.62E-01 -3.57E-01  3.65E-01  3.75E-02
 OM12
+       -3.78E-01 -9.86E-01  9.87E-01  9.80E-01  9.84E-01 -9.86E-01 -2.83E-01  2.79E-01
 OM22
+       -3.61E-01 -9.96E-01  9.98E-01  9.93E-01  9.96E-01 -9.97E-01 -3.52E-01  9.93E-01  1.01E+00
 SG11
+       ......... ......... ......... ......... ......... ......... ......... ......... ......... .........
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 Elapsed finaloutput time in seconds:     0.01
 #CPUT: Total CPU Time in Seconds,       40.066
